// SBML level 2 version 4

model simple_model()
  // simple_model

  // Compartments:
  compartment Blood = 0.24*V_p + 0.09*V_p; Blood has MWBUILTINUNIT_liter;
  compartment Tumor1 = 0.01 MWBUILTINUNIT_liter;
  compartment Tumor1Vas in Tumor1 = 0.05*(1 - hematocrit)*Tumor1; Tumor1Vas has MWBUILTINUNIT_liter;
  compartment Tumor1Int in Tumor1 = 0.38*Tumor1; Tumor1Int has MWBUILTINUNIT_liter;
  compartment Tumor1Bound in Tumor1 = 1 MWBUILTINUNIT_liter;
  compartment Tumor1Intern in Tumor1 = 1 MWBUILTINUNIT_liter;
  compartment Kidney = 0.311 MWBUILTINUNIT_liter;
  compartment KidneyVas in Kidney = 0.055*Kidney; KidneyVas has MWBUILTINUNIT_liter;
  compartment KidneyInt in Kidney = 0.15*Kidney; KidneyInt has MWBUILTINUNIT_liter;
  compartment KidneyBound in Kidney = 1 MWBUILTINUNIT_liter;
  compartment KidneyIntern in Kidney = 1 MWBUILTINUNIT_liter;
  compartment SG = 0.21 MWBUILTINUNIT_liter;
  compartment SGVas in SG = 0.03*(1 - hematocrit)*SG; SGVas has MWBUILTINUNIT_liter;
  compartment SGInt in SG = 0.23*SG; SGInt has MWBUILTINUNIT_liter;
  compartment SGBound in SG = 1 MWBUILTINUNIT_liter;
  compartment SGIntern in SG = 1 MWBUILTINUNIT_liter;
  compartment TumorRest = 1 MWBUILTINUNIT_liter;
  compartment TumorRestVas in TumorRest = 0.05*(1 - hematocrit)*TumorRest; TumorRestVas has MWBUILTINUNIT_liter;
  compartment TumorRestInt in TumorRest = 0.38*TumorRest; TumorRestInt has MWBUILTINUNIT_liter;
  compartment TumorRestBound in TumorRest = 1 MWBUILTINUNIT_liter;
  compartment TumorRestIntern in TumorRest = 1 MWBUILTINUNIT_liter;
  compartment Rest = bodyWeight*dLiterKg - (Kidney + SG); Rest has MWBUILTINUNIT_liter;
  compartment RestVas in Rest = V_p - (KidneyVas + SGVas + Blood); RestVas has MWBUILTINUNIT_liter;
  compartment RestInt in Rest = 4.1*RestVas; RestInt has MWBUILTINUNIT_liter;
  compartment KidneyIntera in Kidney = (Kidney - KidneyInt - KidneyVas)*2/3; KidneyIntera has MWBUILTINUNIT_liter;

  // Species:
  substanceOnly species Hot_Blood in Blood = 0;  // substance in MWBUILTINPREFIX_nano_MWBUILTINUNIT_mole
  substanceOnly species Cold_Blood in Blood = 0;  // substance in MWBUILTINPREFIX_nano_MWBUILTINUNIT_mole
  substanceOnly species R_Tumor1 in Tumor1;  // substance in MWBUILTINPREFIX_nano_MWBUILTINUNIT_mole
  substanceOnly species Hot_Tumor1Vas in Tumor1Vas = 0;  // substance in MWBUILTINPREFIX_nano_MWBUILTINUNIT_mole
  substanceOnly species Cold_Tumor1Vas in Tumor1Vas = 0;  // substance in MWBUILTINPREFIX_nano_MWBUILTINUNIT_mole
  substanceOnly species Hot_Tumor1Int in Tumor1Int = 0;  // substance in MWBUILTINPREFIX_nano_MWBUILTINUNIT_mole
  substanceOnly species Cold_Tumor1Int in Tumor1Int = 0;  // substance in MWBUILTINPREFIX_nano_MWBUILTINUNIT_mole
  substanceOnly species Hot_Tumor1Bound in Tumor1Bound = 0;  // substance in MWBUILTINPREFIX_nano_MWBUILTINUNIT_mole
  substanceOnly species Cold_Tumor1Bound in Tumor1Bound = 0;  // substance in MWBUILTINPREFIX_nano_MWBUILTINUNIT_mole
  substanceOnly species Hot_Tumor1Intern in Tumor1Intern = 0;  // substance in MWBUILTINPREFIX_nano_MWBUILTINUNIT_mole
  substanceOnly species Cold_Tumor1Intern in Tumor1Intern = 0;  // substance in MWBUILTINPREFIX_nano_MWBUILTINUNIT_mole
  substanceOnly species R_Kidney in Kidney;  // substance in MWBUILTINPREFIX_nano_MWBUILTINUNIT_mole
  substanceOnly species Hot_KidneyVas in KidneyVas = 0;  // substance in MWBUILTINPREFIX_nano_MWBUILTINUNIT_mole
  substanceOnly species Cold_KidneyVas in KidneyVas = 0;  // substance in MWBUILTINPREFIX_nano_MWBUILTINUNIT_mole
  substanceOnly species Hot_KidneyInt in KidneyInt = 0;  // substance in MWBUILTINPREFIX_nano_MWBUILTINUNIT_mole
  substanceOnly species Cold_KidneyInt in KidneyInt = 0;  // substance in MWBUILTINPREFIX_nano_MWBUILTINUNIT_mole
  substanceOnly species Hot_KidneyBound in KidneyBound = 0;  // substance in MWBUILTINPREFIX_nano_MWBUILTINUNIT_mole
  substanceOnly species Cold_KidneyBound in KidneyBound = 0;  // substance in MWBUILTINPREFIX_nano_MWBUILTINUNIT_mole
  substanceOnly species Hot_KidneyIntern in KidneyIntern = 0;  // substance in MWBUILTINPREFIX_nano_MWBUILTINUNIT_mole
  substanceOnly species Cold_KidneyIntern in KidneyIntern = 0;  // substance in MWBUILTINPREFIX_nano_MWBUILTINUNIT_mole
  substanceOnly species R_SG in SG;  // substance in MWBUILTINPREFIX_nano_MWBUILTINUNIT_mole
  substanceOnly species Hot_SGVas in SGVas = 0;  // substance in MWBUILTINPREFIX_nano_MWBUILTINUNIT_mole
  substanceOnly species Cold_SGVas in SGVas = 0;  // substance in MWBUILTINPREFIX_nano_MWBUILTINUNIT_mole
  substanceOnly species Hot_SGInt in SGInt = 0;  // substance in MWBUILTINPREFIX_nano_MWBUILTINUNIT_mole
  substanceOnly species Cold_SGInt in SGInt = 0;  // substance in MWBUILTINPREFIX_nano_MWBUILTINUNIT_mole
  substanceOnly species Hot_SGBound in SGBound = 0;  // substance in MWBUILTINPREFIX_nano_MWBUILTINUNIT_mole
  substanceOnly species Cold_SGBound in SGBound = 0;  // substance in MWBUILTINPREFIX_nano_MWBUILTINUNIT_mole
  substanceOnly species Hot_SGIntern in SGIntern = 0;  // substance in MWBUILTINPREFIX_nano_MWBUILTINUNIT_mole
  substanceOnly species Cold_SGIntern in SGIntern = 0;  // substance in MWBUILTINPREFIX_nano_MWBUILTINUNIT_mole
  substanceOnly species R_TumorRest in TumorRest;  // substance in MWBUILTINPREFIX_nano_MWBUILTINUNIT_mole
  substanceOnly species Hot_TumorRestVas in TumorRestVas = 0;  // substance in MWBUILTINPREFIX_nano_MWBUILTINUNIT_mole
  substanceOnly species Cold_TumorRestVas in TumorRestVas = 0;  // substance in MWBUILTINPREFIX_nano_MWBUILTINUNIT_mole
  substanceOnly species Hot_TumorRestInt in TumorRestInt = 0;  // substance in MWBUILTINPREFIX_nano_MWBUILTINUNIT_mole
  substanceOnly species Cold_TumorRestInt in TumorRestInt = 0;  // substance in MWBUILTINPREFIX_nano_MWBUILTINUNIT_mole
  substanceOnly species Hot_TumorRestBound in TumorRestBound = 0;  // substance in MWBUILTINPREFIX_nano_MWBUILTINUNIT_mole
  substanceOnly species Cold_TumorRestBound in TumorRestBound = 0;  // substance in MWBUILTINPREFIX_nano_MWBUILTINUNIT_mole
  substanceOnly species Hot_TumorRestIntern in TumorRestIntern = 0;  // substance in MWBUILTINPREFIX_nano_MWBUILTINUNIT_mole
  substanceOnly species Cold_TumorRestIntern in TumorRestIntern = 0;  // substance in MWBUILTINPREFIX_nano_MWBUILTINUNIT_mole
  substanceOnly species Hot_RestVas in RestVas = 0;  // substance in MWBUILTINPREFIX_nano_MWBUILTINUNIT_mole
  substanceOnly species Cold_RestVas in RestVas = 0;  // substance in MWBUILTINPREFIX_nano_MWBUILTINUNIT_mole
  substanceOnly species Hot_RestInt in RestInt = 0;  // substance in MWBUILTINPREFIX_nano_MWBUILTINUNIT_mole
  substanceOnly species Cold_RestInt in RestInt = 0;  // substance in MWBUILTINPREFIX_nano_MWBUILTINUNIT_mole
  substanceOnly species Hot_KidneyIntera in KidneyIntera = 0;  // substance in MWBUILTINPREFIX_nano_MWBUILTINUNIT_mole
  substanceOnly species Cold_KidneyIntera in KidneyIntera = 0;  // substance in MWBUILTINPREFIX_nano_MWBUILTINUNIT_mole

  // Parameters:
  lambdaPhys = 7.24e-5 MWDERIVEDUNIT_1__minute;
  k_on = 0.046 MWDERIVEDUNIT_liter__nanomole__minute;
  k_off = 0.368 MWDERIVEDUNIT_1__minute;
  F_Tumor1 = f_Tumor1*Tumor1; F_Tumor1 has MWDERIVEDUNIT_liter__minute;
  PS_Tumor1 = kPS_Tumor1*Tumor1; PS_Tumor1 has MWDERIVEDUNIT_liter__minute;
  Rden_Tumor1 = 25 MWDERIVEDUNIT_nanomole__liter;
  R0_Tumor1 = Rden_Tumor1*Tumor1; R0_Tumor1 has MWBUILTINPREFIX_nano_MWBUILTINUNIT_mole;
  lambdaIntern_Tumor1 = 0.001 MWDERIVEDUNIT_1__minute;
  lambdaRel_Tumor1 = 0.00015 MWDERIVEDUNIT_1__minute;
  F_TumorRest = f_Tumor1*R0_TumorRest/Rden_TumorRest; F_TumorRest has MWDERIVEDUNIT_liter__minute;
  PS_TumorRest = kPS_TumorRest*TumorRest; PS_TumorRest has MWDERIVEDUNIT_liter__minute;
  Rden_TumorRest = 25 MWDERIVEDUNIT_nanomole__liter;
  R0_TumorRest = Rden_TumorRest*TumorRest; R0_TumorRest has MWBUILTINPREFIX_nano_MWBUILTINUNIT_mole;
  lambdaIntern_TumorRest = 0.001 MWDERIVEDUNIT_1__minute;
  lambdaRel_TumorRest = 0.00015 MWDERIVEDUNIT_1__minute;
  F_SG = f_SG*SG; F_SG has MWDERIVEDUNIT_liter__minute;
  PS_SG = kPS_SG*SG; PS_SG has MWDERIVEDUNIT_liter__minute;
  Rden_SG = 25 MWDERIVEDUNIT_nanomole__liter;
  R0_SG = Rden_SG*SG; R0_SG has MWBUILTINPREFIX_nano_MWBUILTINUNIT_mole;
  lambdaIntern_SG = 0.001 MWDERIVEDUNIT_1__minute;
  lambdaRel_SG = 0.00042 MWDERIVEDUNIT_1__minute;
  F_Rest = F - (F_Kidney + F_SG); F_Rest has MWDERIVEDUNIT_liter__minute;
  PS_Rest = kPS_Rest*Rest; PS_Rest has MWDERIVEDUNIT_liter__minute;
  F_Kidney = 0.19*F; F_Kidney has MWDERIVEDUNIT_liter__minute;
  Rden_Kidney = 25 MWDERIVEDUNIT_nanomole__liter;
  R0_Kidney = Rden_Kidney*Kidney; R0_Kidney has MWBUILTINPREFIX_nano_MWBUILTINUNIT_mole;
  lambdaIntern_Kidney = 0.001 MWDERIVEDUNIT_1__minute;
  lambdaRel_Kidney = 0.00029 MWDERIVEDUNIT_1__minute;
  GFR = 0.12 MWDERIVEDUNIT_liter__minute;
  phi = 0.66 dimensionless;
  f_exc = 0.96 dimensionless;
  bodySurfaceArea = sqrt(bodyHeight*bodyWeight/3600); bodySurfaceArea has MWDERIVEDUNIT_meter___2;
  hematocrit = 0.4 dimensionless;
  bodyHeight = 160 MWBUILTINPREFIX_centi_MWBUILTINUNIT_meter;
  bodyWeight = 100 kilogram;
  F = V_p*1.23/dMin; F has MWDERIVEDUNIT_liter__minute;
  V_p = 2.8*(1 - hematocrit)*bodySurfaceArea*dLiter/dMeter^2; V_p has MWBUILTINUNIT_liter;
  kPS_Tumor1 = 0.6 MWDERIVEDUNIT_1__minute;
  kPS_TumorRest = 0.6 MWDERIVEDUNIT_1__minute;
  kPS_SG = 2 MWDERIVEDUNIT_1__minute;
  kPS_Rest = 0.02 MWDERIVEDUNIT_1__minute;
  f_SG = 0.074 MWDERIVEDUNIT_1__minute;
  f_Tumor1 = 0.5 MWDERIVEDUNIT_1__minute;
  dMin = 1 MWBUILTINUNIT_minute;
  dLiter = 1 MWBUILTINUNIT_liter;
  dMeter = 1 MWBUILTINUNIT_meter;
  dLiterKg = 1 MWDERIVEDUNIT_liter__kilogram;

  // Assignment rules:
  R_Tumor1 := R0_Tumor1 - Hot_Tumor1Bound - Cold_Tumor1Bound;
  R_Kidney := R0_Kidney - Hot_KidneyBound - Cold_KidneyBound;
  R_SG := R0_SG - Hot_SGBound - Cold_SGBound;
  R_TumorRest := R0_TumorRest - Hot_TumorRestBound - Cold_TumorRestBound;

  // Reactions:
  decay_4: Hot_Blood => Cold_Blood; lambdaPhys*Hot_Blood;
  decay_6: Hot_Tumor1Vas => Cold_Tumor1Vas; lambdaPhys*Hot_Tumor1Vas;
  Vas2Int_4: Hot_Tumor1Vas -> Hot_Tumor1Int; PS_Tumor1/Tumor1Vas*Hot_Tumor1Vas - PS_Tumor1/Tumor1Int*Hot_Tumor1Int;
  Vas2Int_7: Cold_Tumor1Vas -> Cold_Tumor1Int; PS_Tumor1/Tumor1Vas*Cold_Tumor1Vas - PS_Tumor1/Tumor1Int*Cold_Tumor1Int;
  Int2Bound_4: Hot_Tumor1Int -> Hot_Tumor1Bound; k_on/Tumor1Int*R_Tumor1*Hot_Tumor1Int - k_off*Hot_Tumor1Bound;
  Int2Bound_7: Cold_Tumor1Int -> Cold_Tumor1Bound; k_on/Tumor1Int*R_Tumor1*Cold_Tumor1Int - k_off*Cold_Tumor1Bound;
  Bound2Intern_4: Hot_Tumor1Bound => Hot_Tumor1Intern; lambdaIntern_Tumor1*Hot_Tumor1Bound;
  Bound2Intern_7: Cold_Tumor1Bound => Cold_Tumor1Intern; lambdaIntern_Tumor1*Cold_Tumor1Bound;
  inFlow_4: Hot_Blood -> Hot_Tumor1Vas; F_Tumor1/Blood*Hot_Blood - F_Tumor1/Tumor1Vas*Hot_Tumor1Vas;
  inFlow_7: Cold_Blood -> Cold_Tumor1Vas; F_Tumor1/Blood*Cold_Blood - F_Tumor1/Tumor1Vas*Cold_Tumor1Vas;
  decay_7: Hot_Tumor1Int => Cold_Tumor1Int; lambdaPhys*Hot_Tumor1Int;
  decay_8: Hot_Tumor1Bound => Cold_Tumor1Bound; lambdaPhys*Hot_Tumor1Bound;
  decay_9: Hot_Tumor1Intern => Cold_Tumor1Intern; lambdaPhys*Hot_Tumor1Intern;
  Intern2Rel_4: Hot_Tumor1Intern => Hot_Tumor1Int; lambdaRel_Tumor1*Hot_Tumor1Intern;
  Intern2Rel_7: Cold_Tumor1Intern => Cold_Tumor1Int; lambdaRel_Tumor1*Cold_Tumor1Intern;
  decay_12: Hot_KidneyVas => Cold_KidneyVas; lambdaPhys*Hot_KidneyVas;
  Int2Bound_8: Hot_KidneyInt -> Hot_KidneyBound; k_on/KidneyInt*Hot_KidneyInt*R_Kidney - k_off*Hot_KidneyBound;
  Int2Bound_11: Cold_KidneyInt -> Cold_KidneyBound; k_on/KidneyInt*Cold_KidneyInt*R_Kidney - k_off*Cold_KidneyBound;
  Bound2Intern_8: Hot_KidneyBound => Hot_KidneyIntern; lambdaIntern_Kidney*Hot_KidneyBound;
  Bound2Intern_11: Cold_KidneyBound => Cold_KidneyIntern; lambdaIntern_Kidney*Cold_KidneyBound;
  inFlow_12: Hot_Blood -> Hot_KidneyVas; F_Kidney/Blood*Hot_Blood - F_Kidney/KidneyVas*Hot_KidneyVas;
  inFlow_15: Cold_Blood -> Cold_KidneyVas; F_Kidney/Blood*Cold_Blood - F_Kidney/KidneyVas*Cold_KidneyVas;
  decay_13: Hot_KidneyInt => Cold_KidneyInt; lambdaPhys*Hot_KidneyInt;
  decay_14: Hot_KidneyBound => Cold_KidneyBound; lambdaPhys*Hot_KidneyBound;
  decay_15: Hot_KidneyIntern => Cold_KidneyIntern; lambdaPhys*Hot_KidneyIntern;
  Intern2Rel_8: Hot_KidneyIntern => Hot_KidneyInt; lambdaRel_Kidney*Hot_KidneyIntern;
  Intern2Rel_11: Cold_KidneyIntern => Cold_KidneyInt; lambdaRel_Kidney*Cold_KidneyIntern;
  decay_18: Hot_SGVas => Cold_SGVas; lambdaPhys*Hot_SGVas;
  Vas2Int_14: Hot_SGVas -> Hot_SGInt; PS_SG/SGVas*Hot_SGVas - PS_SG/SGInt*Hot_SGInt;
  Vas2Int_17: Cold_SGVas -> Cold_SGInt; PS_SG/SGVas*Cold_SGVas - PS_SG/SGInt*Cold_SGInt;
  Int2Bound_9: Hot_SGInt -> Hot_SGBound; k_on/SGInt*Hot_SGInt*R_SG - k_off*Hot_SGBound;
  Int2Bound_12: Cold_SGInt -> Cold_SGBound; k_on/SGInt*Cold_SGInt*R_SG - k_off*Cold_SGBound;
  Bound2Intern_9: Hot_SGBound => Hot_SGIntern; lambdaIntern_SG*Hot_SGBound;
  Bound2Intern_12: Cold_SGBound => Cold_SGIntern; lambdaIntern_SG*Cold_SGBound;
  inFlow_20: Hot_Blood -> Hot_SGVas; F_SG/Blood*Hot_Blood - F_SG/SGVas*Hot_SGVas;
  inFlow_23: Cold_Blood -> Cold_SGVas; F_SG/Blood*Cold_Blood - F_SG/SGVas*Cold_SGVas;
  decay_19: Hot_SGInt => Cold_SGInt; lambdaPhys*Hot_SGInt;
  decay_20: Hot_SGBound => Cold_SGBound; lambdaPhys*Hot_SGBound;
  decay_21: Hot_SGIntern => Cold_SGIntern; lambdaPhys*Hot_SGIntern;
  Intern2Rel_9: Hot_SGIntern => Hot_SGInt; lambdaRel_SG*Hot_SGIntern;
  Intern2Rel_12: Cold_SGIntern => Cold_SGInt; lambdaRel_SG*Cold_SGIntern;
  decay_24: Hot_TumorRestVas => Cold_TumorRestVas; lambdaPhys*Hot_TumorRestVas;
  Vas2Int_20: Hot_TumorRestVas -> Hot_TumorRestInt; PS_TumorRest/TumorRestVas*Hot_TumorRestVas - PS_TumorRest/TumorRestInt*Hot_TumorRestInt;
  Vas2Int_23: Cold_TumorRestVas -> Cold_TumorRestInt; PS_TumorRest/TumorRestVas*Cold_TumorRestVas - PS_TumorRest/TumorRestInt*Cold_TumorRestInt;
  Int2Bound_10: Hot_TumorRestInt -> Hot_TumorRestBound; k_on/TumorRestInt*Hot_TumorRestInt*R_TumorRest - k_off*Hot_TumorRestBound;
  Int2Bound_15: Cold_TumorRestInt -> Cold_TumorRestBound; k_on/TumorRestInt*Cold_TumorRestInt*R_TumorRest - k_off*Cold_TumorRestBound;
  Bound2Intern_10: Hot_TumorRestBound => Hot_TumorRestIntern; lambdaIntern_TumorRest*Hot_TumorRestBound;
  Bound2Intern_15: Cold_TumorRestBound => Cold_TumorRestIntern; lambdaIntern_TumorRest*Cold_TumorRestBound;
  inFlow_28: Hot_Blood -> Hot_TumorRestVas; F_TumorRest/Blood*Hot_Blood - F_TumorRest/TumorRestVas*Hot_TumorRestVas;
  inFlow_31: Cold_Blood -> Cold_TumorRestVas; F_TumorRest/Blood*Cold_Blood - F_TumorRest/TumorRestVas*Cold_TumorRestVas;
  decay_25: Hot_TumorRestInt => Cold_TumorRestInt; lambdaPhys*Hot_TumorRestInt;
  decay_26: Hot_TumorRestBound => Cold_TumorRestBound; lambdaPhys*Hot_TumorRestBound;
  decay_27: Hot_TumorRestIntern => Cold_TumorRestIntern; lambdaPhys*Hot_TumorRestIntern;
  Intern2Rel_10: Hot_TumorRestIntern => Hot_TumorRestInt; lambdaRel_TumorRest*Hot_TumorRestIntern;
  Intern2Rel_15: Cold_TumorRestIntern => Cold_TumorRestInt; lambdaRel_TumorRest*Cold_TumorRestIntern;
  decay_44: Hot_RestVas => Cold_RestVas; lambdaPhys*Hot_RestVas;
  Vas2Int_32: Hot_RestVas -> Hot_RestInt; PS_Rest/RestVas*Hot_RestVas - PS_Rest/RestInt*Hot_RestInt;
  Vas2Int_33: Cold_RestVas -> Cold_RestInt; PS_Rest/RestVas*Cold_RestVas - PS_Rest/RestInt*Cold_RestInt;
  inFlow_48: Hot_Blood -> Hot_RestVas; F_Rest/Blood*Hot_Blood - F_Rest/RestVas*Hot_RestVas;
  inFlow_51: Cold_Blood -> Cold_RestVas; F_Rest/Blood*Cold_Blood - F_Rest/RestVas*Cold_RestVas;
  decay_45: Hot_RestInt => Cold_RestInt; lambdaPhys*Hot_RestInt;
  Vas2IntKidney_Hot: Hot_KidneyVas => Hot_KidneyInt; GFR*phi/KidneyVas*Hot_KidneyVas;
  Vas2IntKidney_Cold: Cold_KidneyVas => Cold_KidneyInt; GFR*phi/KidneyVas*Cold_KidneyVas;
  Int2IntraHot: Hot_KidneyInt => Hot_KidneyIntera; GFR*phi*(1 - f_exc)/KidneyInt*Hot_KidneyInt;
  Int2IntraCold: Cold_KidneyInt => Cold_KidneyIntera; GFR*phi*(1 - f_exc)/KidneyInt*Cold_KidneyInt;
  Intra2VasHot: Hot_KidneyIntera => Hot_KidneyVas; GFR*phi*(1 - f_exc)/KidneyIntera*Hot_KidneyIntera;
  Intra2VasCold: Cold_KidneyIntera => Cold_KidneyVas; GFR*phi*(1 - f_exc)/KidneyIntera*Cold_KidneyIntera;
  KidneyExcCold: Cold_KidneyInt => ; GFR*phi*f_exc/KidneyInt*Cold_KidneyInt;
  KidneyExcHot: Hot_KidneyInt => ; GFR*phi*f_exc/KidneyInt*Hot_KidneyInt;
  Reaction_1: Hot_KidneyIntera => Cold_KidneyIntera; lambdaPhys*Hot_KidneyIntera;

  // Unit definitions:
  unit MWBUILTINUNIT_liter = metre^3 * 1e-3 dimensionless;
  unit MWBUILTINPREFIX_nano_MWBUILTINUNIT_mole = 1e-9 mole; MWBUILTINPREFIX_nano_MWBUILTINUNIT_mole is "nanomole";
  unit MWDERIVEDUNIT_1__minute = 0.01666667 dimensionless / second; MWDERIVEDUNIT_1__minute is "1/minute";
  unit MWDERIVEDUNIT_liter__nanomole__minute = metre^3 * 16666.67 dimensionless / (mole * second); MWDERIVEDUNIT_liter__nanomole__minute is "liter/nanomole/minute";
  unit MWDERIVEDUNIT_liter__minute = metre^3 * 1.666667e-5 dimensionless / second; MWDERIVEDUNIT_liter__minute is "liter/minute";
  unit MWDERIVEDUNIT_nanomole__liter = mole * 1e-6 dimensionless / metre^3; MWDERIVEDUNIT_nanomole__liter is "nanomole/liter";
  unit MWDERIVEDUNIT_meter___2 = metre^2 * dimensionless; MWDERIVEDUNIT_meter___2 is "meter^2";
  unit MWBUILTINPREFIX_centi_MWBUILTINUNIT_meter = 0.01 metre; MWBUILTINPREFIX_centi_MWBUILTINUNIT_meter is "centimeter";
  unit MWBUILTINUNIT_minute = 60 second;
  unit MWBUILTINUNIT_meter = metre;
  unit MWDERIVEDUNIT_liter__kilogram = metre^3 * 1e-6 dimensionless / gram; MWDERIVEDUNIT_liter__kilogram is "liter/kilogram";
end
