// SBML level 2 version 4

model Lu177_PSMA_reduced_pkpdCoupled_powerLaw_kidFix_releaseFix()
  // Lu177_PSMA_reduced_pkpdCoupled_powerLaw_kidFix_releaseFix
  // tumourDensity: inputted at 1.05 g/mL. Can be adjusted given data f_exc is originally 0.96

  // Compartments:
  compartment Blood = 0.24*V_p + 0.09*V_p; Blood has MWBUILTINUNIT_liter;
  compartment Tumor1; Tumor1 has MWBUILTINUNIT_liter;
  compartment Tumor1Vas in Tumor1; Tumor1Vas has MWBUILTINUNIT_liter;
  compartment Tumor1Int in Tumor1; Tumor1Int has MWBUILTINUNIT_liter;
  compartment Tumor1Bound in Tumor1 = 1 MWBUILTINUNIT_liter;
  compartment Tumor1Intern in Tumor1 = 1 MWBUILTINUNIT_liter;
  compartment Kidney = 0.311 MWBUILTINUNIT_liter;
  compartment KidneyVas in Kidney = 0.055*Kidney; KidneyVas has MWBUILTINUNIT_liter;
  compartment KidneyTubule in Kidney = 0.15*Kidney; KidneyTubule has MWBUILTINUNIT_liter;
  compartment KidneyBound in Kidney = 1 MWBUILTINUNIT_liter;
  compartment KidneyIntern in Kidney = 1 MWBUILTINUNIT_liter;
  compartment SG = 0.021 MWBUILTINUNIT_liter;
  compartment SGVas in SG = 0.03*(1 - hematocrit)*SG; SGVas has MWBUILTINUNIT_liter;
  compartment SGInt in SG = 0.23*SG; SGInt has MWBUILTINUNIT_liter;
  compartment SGBound in SG = 1 MWBUILTINUNIT_liter;
  compartment SGIntern in SG = 1 MWBUILTINUNIT_liter;
  compartment TumorRest = R0_TumorRest/Rden_TumorRest; TumorRest has MWBUILTINUNIT_liter;
  compartment TumorRestVas in TumorRest = 0.05*(1 - hematocrit)*TumorRest; TumorRestVas has MWBUILTINUNIT_liter;
  compartment TumorRestInt in TumorRest = 0.38*TumorRest; TumorRestInt has MWBUILTINUNIT_liter;
  compartment TumorRestBound in TumorRest = 1 MWBUILTINUNIT_liter;
  compartment TumorRestIntern in TumorRest = 1 MWBUILTINUNIT_liter;
  compartment Rest = bodyWeight*dLiterKg - (Kidney + SG); Rest has MWBUILTINUNIT_liter;
  compartment RestVas in Rest = V_p - (KidneyVas + SGVas); RestVas has MWBUILTINUNIT_liter;
  compartment RestInt in Rest = 4.1*RestVas; RestInt has MWBUILTINUNIT_liter;
  compartment KidneyInt in Kidney = (Kidney - KidneyTubule - KidneyVas)*2/3; KidneyInt has MWBUILTINUNIT_liter;
  compartment Tumor1Mass;

  // Species:
  substanceOnly species Hot_Blood in Blood = 0;  // substance in MWBUILTINPREFIX_nano_MWBUILTINUNIT_mole
  substanceOnly species Cold_Blood in Blood = 0;  // substance in MWBUILTINPREFIX_nano_MWBUILTINUNIT_mole
  substanceOnly species R_Tumor1_29 in Tumor1;  // substance in MWBUILTINPREFIX_nano_MWBUILTINUNIT_mole
  substanceOnly species Hot_Tumor1Vas in Tumor1Vas = 0;  // substance in MWBUILTINPREFIX_nano_MWBUILTINUNIT_mole
  substanceOnly species Cold_Tumor1Vas in Tumor1Vas = 0;  // substance in MWBUILTINPREFIX_nano_MWBUILTINUNIT_mole
  substanceOnly species Hot_Tumor1Int in Tumor1Int = 0;  // substance in MWBUILTINPREFIX_nano_MWBUILTINUNIT_mole
  substanceOnly species Cold_Tumor1Int in Tumor1Int = 0;  // substance in MWBUILTINPREFIX_nano_MWBUILTINUNIT_mole
  substanceOnly species Hot_Tumor1Bound in Tumor1Bound = 0;  // substance in MWBUILTINPREFIX_nano_MWBUILTINUNIT_mole
  substanceOnly species Cold_Tumor1Bound in Tumor1Bound = 0;  // substance in MWBUILTINPREFIX_nano_MWBUILTINUNIT_mole
  substanceOnly species Hot_Tumor1Intern in Tumor1Intern = 0;  // substance in MWBUILTINPREFIX_nano_MWBUILTINUNIT_mole
  substanceOnly species Cold_Tumor1Intern in Tumor1Intern = 0;  // substance in MWBUILTINPREFIX_nano_MWBUILTINUNIT_mole
  substanceOnly species R_Kidney in Kidney;  // substance in MWBUILTINPREFIX_nano_MWBUILTINUNIT_mole
  substanceOnly species Hot_KidneyVas in KidneyVas = 0;  // substance in MWBUILTINPREFIX_nano_MWBUILTINUNIT_mole
  substanceOnly species Cold_KidneyVas in KidneyVas = 0;  // substance in MWBUILTINPREFIX_nano_MWBUILTINUNIT_mole
  substanceOnly species Hot_KidneyTubule in KidneyTubule = 0;  // substance in MWBUILTINPREFIX_nano_MWBUILTINUNIT_mole
  substanceOnly species Cold_KidneyTubule in KidneyTubule = 0;  // substance in MWBUILTINPREFIX_nano_MWBUILTINUNIT_mole
  substanceOnly species Hot_KidneyBound in KidneyBound = 0;  // substance in MWBUILTINPREFIX_nano_MWBUILTINUNIT_mole
  substanceOnly species Cold_KidneyBound in KidneyBound = 0;  // substance in MWBUILTINPREFIX_nano_MWBUILTINUNIT_mole
  substanceOnly species Hot_KidneyIntern in KidneyIntern = 0;  // substance in MWBUILTINPREFIX_nano_MWBUILTINUNIT_mole
  substanceOnly species Cold_KidneyIntern in KidneyIntern = 0;  // substance in MWBUILTINPREFIX_nano_MWBUILTINUNIT_mole
  substanceOnly species R_SG in SG;  // substance in MWBUILTINPREFIX_nano_MWBUILTINUNIT_mole
  substanceOnly species Hot_SGVas in SGVas = 0;  // substance in MWBUILTINPREFIX_nano_MWBUILTINUNIT_mole
  substanceOnly species Cold_SGVas in SGVas = 0;  // substance in MWBUILTINPREFIX_nano_MWBUILTINUNIT_mole
  substanceOnly species Hot_SGInt in SGInt = 0;  // substance in MWBUILTINPREFIX_nano_MWBUILTINUNIT_mole
  substanceOnly species Cold_SGInt in SGInt = 0;  // substance in MWBUILTINPREFIX_nano_MWBUILTINUNIT_mole
  substanceOnly species Hot_SGBound in SGBound = 0;  // substance in MWBUILTINPREFIX_nano_MWBUILTINUNIT_mole
  substanceOnly species Cold_SGBound in SGBound = 0;  // substance in MWBUILTINPREFIX_nano_MWBUILTINUNIT_mole
  substanceOnly species Hot_SGIntern in SGIntern = 0;  // substance in MWBUILTINPREFIX_nano_MWBUILTINUNIT_mole
  substanceOnly species Cold_SGIntern in SGIntern = 0;  // substance in MWBUILTINPREFIX_nano_MWBUILTINUNIT_mole
  substanceOnly species R_TumorRest in TumorRest;  // substance in MWBUILTINPREFIX_nano_MWBUILTINUNIT_mole
  substanceOnly species Hot_TumorRestVas in TumorRestVas = 0;  // substance in MWBUILTINPREFIX_nano_MWBUILTINUNIT_mole
  substanceOnly species Cold_TumorRestVas in TumorRestVas = 0;  // substance in MWBUILTINPREFIX_nano_MWBUILTINUNIT_mole
  substanceOnly species Hot_TumorRestInt in TumorRestInt = 0;  // substance in MWBUILTINPREFIX_nano_MWBUILTINUNIT_mole
  substanceOnly species Cold_TumorRestInt in TumorRestInt = 0;  // substance in MWBUILTINPREFIX_nano_MWBUILTINUNIT_mole
  substanceOnly species Hot_TumorRestBound in TumorRestBound = 0;  // substance in MWBUILTINPREFIX_nano_MWBUILTINUNIT_mole
  substanceOnly species Cold_TumorRestBound in TumorRestBound = 0;  // substance in MWBUILTINPREFIX_nano_MWBUILTINUNIT_mole
  substanceOnly species Hot_TumorRestIntern in TumorRestIntern = 0;  // substance in MWBUILTINPREFIX_nano_MWBUILTINUNIT_mole
  substanceOnly species Cold_TumorRestIntern in TumorRestIntern = 0;  // substance in MWBUILTINPREFIX_nano_MWBUILTINUNIT_mole
  substanceOnly species Hot_RestVas in RestVas = 0;  // substance in MWBUILTINPREFIX_nano_MWBUILTINUNIT_mole
  substanceOnly species Cold_RestVas in RestVas = 0;  // substance in MWBUILTINPREFIX_nano_MWBUILTINUNIT_mole
  substanceOnly species Hot_RestInt in RestInt = 0;  // substance in MWBUILTINPREFIX_nano_MWBUILTINUNIT_mole
  substanceOnly species Cold_RestInt in RestInt = 0;  // substance in MWBUILTINPREFIX_nano_MWBUILTINUNIT_mole
  substanceOnly species Hot_KidneyInt in KidneyInt = 0;  // substance in MWBUILTINPREFIX_nano_MWBUILTINUNIT_mole
  substanceOnly species Cold_KidneyInt in KidneyInt = 0;  // substance in MWBUILTINPREFIX_nano_MWBUILTINUNIT_mole
  substanceOnly species Proliferating in Tumor1Mass = 7;  // substance in gram
  substanceOnly species SublethalDamage in Tumor1Mass = 0;  // substance in gram
  substanceOnly species LethalDamage in Tumor1Mass = 0;  // substance in gram
  substanceOnly species Tumor1_degradedCum in Tumor1Mass = 0;  // substance in gram

  // Parameters:
  lambdaPhys = 7.15e-5 MWDERIVEDUNIT_1__minute;
  k_on = 0.046 MWDERIVEDUNIT_liter__nanomole__minute;
  k_off = 0.368 MWDERIVEDUNIT_1__minute;
  F_Tumor1 = f_Tumor1*Tumor1; F_Tumor1 has MWDERIVEDUNIT_liter__minute;
  PS_Tumor1 = kPS_Tumor1*Tumor1; PS_Tumor1 has MWDERIVEDUNIT_liter__minute;
  Rden_Tumor1_0 = 57 MWDERIVEDUNIT_nanomole__liter;
  R0_Tumor1 = Rden_Tumor1_0*Tumor1; R0_Tumor1 has MWBUILTINPREFIX_nano_MWBUILTINUNIT_mole;
  lambdaIntern_Tumor1 = 0.001 MWDERIVEDUNIT_1__minute;
  lambdaRel_Tumor1 = 0.00015 MWDERIVEDUNIT_1__minute;
  F_TumorRest = f_Tumor1*R0_TumorRest/Rden_TumorRest; F_TumorRest has MWDERIVEDUNIT_liter__minute;
  PS_TumorRest = kPS_TumorRest*TumorRest; PS_TumorRest has MWDERIVEDUNIT_liter__minute;
  Rden_TumorRest = 266 MWDERIVEDUNIT_nanomole__liter;
  R0_TumorRest = 13 MWBUILTINPREFIX_nano_MWBUILTINUNIT_mole;
  lambdaIntern_TumorRest = 0.001 MWDERIVEDUNIT_1__minute;
  lambdaRel_TumorRest = 0.00015 MWDERIVEDUNIT_1__minute;
  F_SG = f_SG*SG; F_SG has MWDERIVEDUNIT_liter__minute;
  PS_SG = kPS_SG*SG; PS_SG has MWDERIVEDUNIT_liter__minute;
  Rden_SG = 38 MWDERIVEDUNIT_nanomole__liter;
  R0_SG = Rden_SG*SG; R0_SG has MWBUILTINPREFIX_nano_MWBUILTINUNIT_mole;
  lambdaIntern_SG = lambdaIntern_Normal; lambdaIntern_SG has MWDERIVEDUNIT_1__minute;
  lambdaRel_SG = 0.00042 MWDERIVEDUNIT_1__minute;
  F_Rest = F - (F_Kidney + F_SG); F_Rest has MWDERIVEDUNIT_liter__minute;
  PS_Rest = kPS_Rest*Rest; PS_Rest has MWDERIVEDUNIT_liter__minute;
  F_Lungs = F; F_Lungs has MWDERIVEDUNIT_liter__minute;
  F_Kidney = 0.19*F; F_Kidney has MWDERIVEDUNIT_liter__minute;
  TER_Kidney = 0.2 MWDERIVEDUNIT_liter__minute;
  Rden_Kidney = 14 MWDERIVEDUNIT_nanomole__liter;
  R0_Kidney = Rden_Kidney*Kidney; R0_Kidney has MWBUILTINPREFIX_nano_MWBUILTINUNIT_mole;
  lambdaIntern_Kidney = lambdaIntern_Tumor1; lambdaIntern_Kidney has MWDERIVEDUNIT_1__minute;
  lambdaRel_Kidney = 0.00029 MWDERIVEDUNIT_1__minute;
  GFR = TER_Kidney/3*201/151; GFR has MWDERIVEDUNIT_liter__minute;
  phi = 0.66 dimensionless;
  f_exc = 0.96 dimensionless;
  lambdaIntern_Normal = lambdaIntern_Tumor1; lambdaIntern_Normal has MWDERIVEDUNIT_1__minute;
  lambdaRel_Normal = lambdaRel_Kidney; lambdaRel_Normal has MWDERIVEDUNIT_1__minute;
  bodySurfaceArea = 1.9 MWDERIVEDUNIT_meter___2;
  hematocrit = 0.4 dimensionless;
  bodyHeight = 160 MWBUILTINUNIT_meter;
  bodyWeight = 100 kilogram;
  F = V_p*1.23/dMin; F has MWDERIVEDUNIT_liter__minute;
  V_p = 2.8*(1 - hematocrit)*bodySurfaceArea*dLiter/dMeter^2; V_p has MWBUILTINUNIT_liter;
  kPS_Tumor1 = 0.6 MWDERIVEDUNIT_1__minute;
  kPS_TumorRest = 0.6 MWDERIVEDUNIT_1__minute;
  kPS_SG = 0.02*100; kPS_SG has MWDERIVEDUNIT_1__minute;
  kPS_Rest = 0.02 MWDERIVEDUNIT_1__minute;
  F_Total = F + F_Tumor1 + F_TumorRest; F_Total has MWDERIVEDUNIT_liter__minute;
  f_SG = 0.074 MWDERIVEDUNIT_1__minute;
  f_Tumor1 = 0.5 MWDERIVEDUNIT_1__minute;
  dMin = 1 MWBUILTINUNIT_minute;
  dLiter = 1 MWBUILTINUNIT_liter;
  dMeter = 1 MWBUILTINUNIT_meter;
  dLiterKg = 1 MWDERIVEDUNIT_liter__kilogram;
  HotAmount = 10 MWBUILTINPREFIX_nano_MWBUILTINUNIT_mole;
  ColdAmount = 100 MWBUILTINPREFIX_nano_MWBUILTINUNIT_mole;
  k_Ka has MWDERIVEDUNIT_1__minute;
  k_Kp has MWDERIVEDUNIT_1__minute;
  k_Kpp has MWDERIVEDUNIT_1__minute;
  SValue_Tumor1 has MWDERIVEDUNIT_gray__megabecquerel__minute;
  DoseRate_Tumor1 has MWDERIVEDUNIT_gray__minute;
  K_Tumor1 = 11 gram;
  u_T = 0.00608333333 MWDERIVEDUNIT_1__minute;
  k_g = 3.16666e-6 MWDERIVEDUNIT_1__minute;
  k_c = 0.000333333 MWDERIVEDUNIT_1__minute;
  p = 0.61 MWDERIVEDUNIT_1__gray;
  epsilon = 0.11 dimensionless;
  dGram = 1 gram;
  dGray = 1 gray;
  dNanomole = 1 MWBUILTINPREFIX_nano_MWBUILTINUNIT_mole;
  nmol2MBQ = lambdaPhys*avogadro_145*(1/60)/1e9/1e6*dMin*(dMole/dNanomole)*dMegabecquerel; nmol2MBQ has MWDERIVEDUNIT_megabecquerel__nanomole;
  alpha = 0.036 MWDERIVEDUNIT_1__gray;
  avogadro_145 = 6.022e23 MWDERIVEDUNIT_1__mole;
  log_PD_tumorRatio has dimensionless;
  dMole = 1 mole;
  dMegabecquerel = 1 MWBUILTINPREFIX_mega_MWBUILTINUNIT_becquerel;
  tumorDensity = 1050 MWDERIVEDUNIT_gram__liter;
  // Mass of a 20 um diameter cell (PMID: 15723561) Logic function updated: if less than the minTumorMass, then tumor mass is zero Old: Tumor_LN1_Mass = ((Tumor_LN1_Mass.Proliferating+Tumor_LN1_Mass.SublethalDamage+Tumor_LN1_Mass.LethalDamage)>minTumorMass)*(Tumor_LN1_Mass.Proliferating+Tumor_LN1_Mass.SublethalDamage+Tumor_LN1_Mass.LethalDamage)+((Tumor_LN1_Mass.Proliferating+Tumor_LN1_Mass.SublethalDamage+Tumor_LN1_Mass.LethalDamage)<=minTumorMass)*minTumorMass
  minTumorMass = 4.4e-9 gram;
  Tumor1_0 = Tumor1; Tumor1_0 has MWBUILTINUNIT_liter;
  gamma = 1.5 dimensionless;
  Rden_Tumor1 has MWDERIVEDUNIT_nanomole__liter;
  R_Tumor1_154 has MWBUILTINPREFIX_nano_MWBUILTINUNIT_mole;
  Rden_Tumor1_min = 0.25*Rden_Tumor1_0; Rden_Tumor1_min has MWDERIVEDUNIT_nanomole__liter;
  sValue_Hindie has MWDERIVEDUNIT_gray__megabecquerel__minute;
  sValue_Olguin has MWDERIVEDUNIT_gray__megabecquerel__minute;
  LT_massTransition = 0.01913141 gram;
  LT_k = 4 dimensionless;
  sValue_LT has dimensionless;
  sValue_multiscale has MWDERIVEDUNIT_gray__megabecquerel__minute;

  // Assignment rules:
  R_Tumor1_29 := R_Tumor1_154 - Hot_Tumor1Bound - Cold_Tumor1Bound;
  R_Kidney := R0_Kidney - Hot_KidneyBound - Cold_KidneyBound;
  R_SG := R0_SG - Hot_SGBound - Cold_SGBound;
  R_TumorRest := R0_TumorRest - Hot_TumorRestBound - Cold_TumorRestBound;
  Tumor1Mass := (Proliferating + SublethalDamage + LethalDamage > minTumorMass)*(Proliferating + SublethalDamage + LethalDamage);
  DoseRate_Tumor1 := sValue_multiscale*(Hot_Tumor1Vas + Hot_Tumor1Int + Hot_Tumor1Bound + Hot_Tumor1Intern)*nmol2MBQ;
  k_Ka := alpha*DoseRate_Tumor1;
  k_Kp := 2*p*DoseRate_Tumor1;
  k_Kpp := (p + alpha)*epsilon*DoseRate_Tumor1;
  SValue_Tumor1 := (Tumor1Mass > minTumorMass)*83*(Tumor1Mass/dGram)^(-0.99)/60/1000*dGray/dMegabecquerel/dMin;
  Tumor1 := Tumor1Mass/tumorDensity;
  log_PD_tumorRatio := (Tumor1Mass > minTumorMass)*ln(K_Tumor1/Tumor1Mass);
  Tumor1Vas := 0.05*(1 - hematocrit)*Tumor1;
  Tumor1Int := 0.38*Tumor1;
  Rden_Tumor1 := Rden_Tumor1_0*(Tumor1/Tumor1_0)^(1/4);
  R_Tumor1_154 := Rden_Tumor1*Tumor1;
  sValue_Hindie := 159.4*(Tumor1Mass/(tumorDensity/1000))^(-0.815)*(1/1000)*(1/60);
  sValue_Olguin := 79.6*(Tumor1Mass/(tumorDensity/1000))^(-0.985)*(1/1000)*(1/60);
  sValue_LT := (1 + (LT_massTransition/Tumor1Mass)^LT_k)^(-1);
  sValue_multiscale := (Tumor1Mass > minTumorMass)*((1 - sValue_LT)*sValue_Hindie + sValue_LT*sValue_Olguin);

  // Rate rules:
  Tumor1_degradedCum' = k_c*LethalDamage;

  // Reactions:
  decay_4: Hot_Blood => Cold_Blood; lambdaPhys*Hot_Blood;
  decay_6: Hot_Tumor1Vas => Cold_Tumor1Vas; lambdaPhys*Hot_Tumor1Vas;
  Vas2Int_4: Hot_Tumor1Vas -> Hot_Tumor1Int; PS_Tumor1/Tumor1Vas*Hot_Tumor1Vas - PS_Tumor1/Tumor1Int*Hot_Tumor1Int;
  Vas2Int_7: Cold_Tumor1Vas -> Cold_Tumor1Int; PS_Tumor1/Tumor1Vas*Cold_Tumor1Vas - PS_Tumor1/Tumor1Int*Cold_Tumor1Int;
  Int2Bound_4: Hot_Tumor1Int -> Hot_Tumor1Bound; k_on/Tumor1Int*R_Tumor1_29*Hot_Tumor1Int - k_off*Hot_Tumor1Bound;
  Int2Bound_7: Cold_Tumor1Int -> Cold_Tumor1Bound; k_on/Tumor1Int*R_Tumor1_29*Cold_Tumor1Int - k_off*Cold_Tumor1Bound;
  Bound2Intern_4: Hot_Tumor1Bound => Hot_Tumor1Intern; lambdaIntern_Tumor1*Hot_Tumor1Bound;
  Bound2Intern_7: Cold_Tumor1Bound => Cold_Tumor1Intern; lambdaIntern_Tumor1*Cold_Tumor1Bound;
  inFlow_4: Hot_Blood -> Hot_Tumor1Vas; F_Tumor1/Blood*Hot_Blood - F_Tumor1/Tumor1Vas*Hot_Tumor1Vas;
  inFlow_7: Cold_Blood -> Cold_Tumor1Vas; F_Tumor1/Blood*Cold_Blood - F_Tumor1/Tumor1Vas*Cold_Tumor1Vas;
  decay_7: Hot_Tumor1Int => Cold_Tumor1Int; lambdaPhys*Hot_Tumor1Int;
  decay_8: Hot_Tumor1Bound => Cold_Tumor1Bound; lambdaPhys*Hot_Tumor1Bound;
  decay_9: Hot_Tumor1Intern => Cold_Tumor1Intern; lambdaPhys*Hot_Tumor1Intern;
  Intern2Rel_4: Hot_Tumor1Intern => Hot_Tumor1Int; lambdaRel_Tumor1*Hot_Tumor1Intern;
  Intern2Rel_7: Cold_Tumor1Intern => Cold_Tumor1Int; lambdaRel_Tumor1*Cold_Tumor1Intern;
  decay_12: Hot_KidneyVas => Cold_KidneyVas; lambdaPhys*Hot_KidneyVas;
  Int2Bound_8: Hot_KidneyTubule -> Hot_KidneyBound; k_on/KidneyTubule*Hot_KidneyTubule*R_Kidney - k_off*Hot_KidneyBound;
  Int2Bound_11: Cold_KidneyTubule -> Cold_KidneyBound; k_on/KidneyTubule*Cold_KidneyTubule*R_Kidney - k_off*Cold_KidneyBound;
  Bound2Intern_8: Hot_KidneyBound => Hot_KidneyIntern; lambdaIntern_Kidney*Hot_KidneyBound;
  Bound2Intern_11: Cold_KidneyBound => Cold_KidneyIntern; lambdaIntern_Kidney*Cold_KidneyBound;
  inFlow_12: Hot_Blood -> Hot_KidneyVas; F_Kidney/Blood*Hot_Blood - F_Kidney/KidneyVas*Hot_KidneyVas;
  inFlow_15: Cold_Blood -> Cold_KidneyVas; F_Kidney/Blood*Cold_Blood - F_Kidney/KidneyVas*Cold_KidneyVas;
  decay_13: Hot_KidneyTubule => Cold_KidneyTubule; lambdaPhys*Hot_KidneyTubule;
  decay_14: Hot_KidneyBound => Cold_KidneyBound; lambdaPhys*Hot_KidneyBound;
  decay_15: Hot_KidneyIntern => Cold_KidneyIntern; lambdaPhys*Hot_KidneyIntern;
  Intern2Rel_8: Hot_KidneyIntern => Hot_KidneyTubule; lambdaRel_Kidney*Hot_KidneyIntern;
  Intern2Rel_11: Cold_KidneyIntern => Cold_KidneyTubule; lambdaRel_Kidney*Cold_KidneyIntern;
  decay_18: Hot_SGVas => Cold_SGVas; lambdaPhys*Hot_SGVas;
  Vas2Int_14: Hot_SGVas -> Hot_SGInt; PS_SG/SGVas*Hot_SGVas - PS_SG/SGInt*Hot_SGInt;
  Vas2Int_17: Cold_SGVas -> Cold_SGInt; PS_SG/SGVas*Cold_SGVas - PS_SG/SGInt*Cold_SGInt;
  Int2Bound_9: Hot_SGInt -> Hot_SGBound; k_on/SGInt*Hot_SGInt*R_SG - k_off*Hot_SGBound;
  Int2Bound_12: Cold_SGInt -> Cold_SGBound; k_on/SGInt*Cold_SGInt*R_SG - k_off*Cold_SGBound;
  Bound2Intern_9: Hot_SGBound => Hot_SGIntern; lambdaIntern_SG*Hot_SGBound;
  Bound2Intern_12: Cold_SGBound => Cold_SGIntern; lambdaIntern_SG*Cold_SGBound;
  inFlow_20: Hot_Blood -> Hot_SGVas; F_SG/Blood*Hot_Blood - F_SG/SGVas*Hot_SGVas;
  inFlow_23: Cold_Blood -> Cold_SGVas; F_SG/Blood*Cold_Blood - F_SG/SGVas*Cold_SGVas;
  decay_19: Hot_SGInt => Cold_SGInt; lambdaPhys*Hot_SGInt;
  decay_20: Hot_SGBound => Cold_SGBound; lambdaPhys*Hot_SGBound;
  decay_21: Hot_SGIntern => Cold_SGIntern; lambdaPhys*Hot_SGIntern;
  Intern2Rel_9: Hot_SGIntern => Hot_SGInt; lambdaRel_SG*Hot_SGIntern;
  Intern2Rel_12: Cold_SGIntern => Cold_SGInt; lambdaRel_SG*Cold_SGIntern;
  decay_24: Hot_TumorRestVas => Cold_TumorRestVas; lambdaPhys*Hot_TumorRestVas;
  Vas2Int_20: Hot_TumorRestVas -> Hot_TumorRestInt; PS_TumorRest/TumorRestVas*Hot_TumorRestVas - PS_TumorRest/TumorRestInt*Hot_TumorRestInt;
  Vas2Int_23: Cold_TumorRestVas -> Cold_TumorRestInt; PS_TumorRest/TumorRestVas*Cold_TumorRestVas - PS_TumorRest/TumorRestInt*Cold_TumorRestInt;
  Int2Bound_10: Hot_TumorRestInt -> Hot_TumorRestBound; k_on/TumorRestInt*Hot_TumorRestInt*R_TumorRest - k_off*Hot_TumorRestBound;
  Int2Bound_15: Cold_TumorRestInt -> Cold_TumorRestBound; k_on/TumorRestInt*Cold_TumorRestInt*R_TumorRest - k_off*Cold_TumorRestBound;
  Bound2Intern_10: Hot_TumorRestBound => Hot_TumorRestIntern; lambdaIntern_TumorRest*Hot_TumorRestBound;
  Bound2Intern_15: Cold_TumorRestBound => Cold_TumorRestIntern; lambdaIntern_TumorRest*Cold_TumorRestBound;
  inFlow_28: Hot_Blood -> Hot_TumorRestVas; F_TumorRest/Blood*Hot_Blood - F_TumorRest/TumorRestVas*Hot_TumorRestVas;
  inFlow_31: Cold_Blood -> Cold_TumorRestVas; F_TumorRest/Blood*Cold_Blood - F_TumorRest/TumorRestVas*Cold_TumorRestVas;
  decay_25: Hot_TumorRestInt => Cold_TumorRestInt; lambdaPhys*Hot_TumorRestInt;
  decay_26: Hot_TumorRestBound => Cold_TumorRestBound; lambdaPhys*Hot_TumorRestBound;
  decay_27: Hot_TumorRestIntern => Cold_TumorRestIntern; lambdaPhys*Hot_TumorRestIntern;
  Intern2Rel_10: Hot_TumorRestIntern => Hot_TumorRestInt; lambdaRel_TumorRest*Hot_TumorRestIntern;
  Intern2Rel_15: Cold_TumorRestIntern => Cold_TumorRestInt; lambdaRel_TumorRest*Cold_TumorRestIntern;
  decay_44: Hot_RestVas => Cold_RestVas; lambdaPhys*Hot_RestVas;
  Vas2Int_32: Hot_RestVas -> Hot_RestInt; PS_Rest/RestVas*Hot_RestVas - PS_Rest/RestInt*Hot_RestInt;
  Vas2Int_33: Cold_RestVas -> Cold_RestInt; PS_Rest/RestVas*Cold_RestVas - PS_Rest/RestInt*Cold_RestInt;
  inFlow_48: Hot_Blood -> Hot_RestVas; F_Rest/Blood*Hot_Blood - F_Rest/RestVas*Hot_RestVas;
  inFlow_51: Cold_Blood -> Cold_RestVas; F_Rest/Blood*Cold_Blood - F_Rest/RestVas*Cold_RestVas;
  decay_45: Hot_RestInt => Cold_RestInt; lambdaPhys*Hot_RestInt;
  Vas2IntKidney_Hot: Hot_KidneyVas => Hot_KidneyTubule; GFR*phi/KidneyVas*Hot_KidneyVas;
  Vas2IntKidney_Cold: Cold_KidneyVas => Cold_KidneyTubule; GFR*phi/KidneyVas*Cold_KidneyVas;
  Int2IntraHot: Hot_KidneyTubule => Hot_KidneyInt; GFR*phi*(1 - f_exc)/KidneyTubule*Hot_KidneyTubule;
  Int2IntraCold: Cold_KidneyTubule => Cold_KidneyInt; GFR*phi*(1 - f_exc)/KidneyTubule*Cold_KidneyTubule;
  Intra2VasHot: Hot_KidneyInt => Hot_KidneyVas; GFR*phi*(1 - f_exc)/KidneyInt*Hot_KidneyInt;
  Intra2VasCold: Cold_KidneyInt => Cold_KidneyVas; GFR*phi*(1 - f_exc)/KidneyInt*Cold_KidneyInt;
  KidneyExcCold: Cold_KidneyTubule => ; GFR*phi*f_exc/KidneyTubule*Cold_KidneyTubule;
  KidneyExcHot: Hot_KidneyTubule => ; GFR*phi*f_exc/KidneyTubule*Hot_KidneyTubule;
  Reaction_49: => Proliferating; k_g*log_PD_tumorRatio*Proliferating;
  Reaction_51: Proliferating => LethalDamage; k_Ka*Proliferating;
  Reaction_52: Proliferating -> SublethalDamage; k_Kp*Proliferating - u_T*SublethalDamage;
  Reaction_53: SublethalDamage => LethalDamage; k_Kpp*SublethalDamage;
  Reaction_54: LethalDamage => ; k_c*LethalDamage;
  Reaction_1: Hot_KidneyInt => Cold_KidneyInt; lambdaPhys*Hot_KidneyInt;

  // Unit definitions:
  unit MWBUILTINUNIT_liter = metre^3 * 1e-3 dimensionless;
  unit MWBUILTINPREFIX_nano_MWBUILTINUNIT_mole = 1e-9 mole; MWBUILTINPREFIX_nano_MWBUILTINUNIT_mole is "nanomole";
  unit MWDERIVEDUNIT_1__minute = 0.01666667 dimensionless / second; MWDERIVEDUNIT_1__minute is "1/minute";
  unit MWDERIVEDUNIT_liter__nanomole__minute = metre^3 * 16666.67 dimensionless / (mole * second); MWDERIVEDUNIT_liter__nanomole__minute is "liter/nanomole/minute";
  unit MWDERIVEDUNIT_liter__minute = metre^3 * 1.666667e-5 dimensionless / second; MWDERIVEDUNIT_liter__minute is "liter/minute";
  unit MWDERIVEDUNIT_nanomole__liter = mole * 1e-6 dimensionless / metre^3; MWDERIVEDUNIT_nanomole__liter is "nanomole/liter";
  unit MWDERIVEDUNIT_meter___2 = metre^2 * dimensionless; MWDERIVEDUNIT_meter___2 is "meter^2";
  unit MWBUILTINUNIT_meter = metre;
  unit MWBUILTINUNIT_minute = 60 second;
  unit MWDERIVEDUNIT_liter__kilogram = metre^3 * 1e-6 dimensionless / gram; MWDERIVEDUNIT_liter__kilogram is "liter/kilogram";
  unit MWDERIVEDUNIT_gray__megabecquerel__minute = metre^2 * 1.666667e-8 dimensionless / second^2; MWDERIVEDUNIT_gray__megabecquerel__minute is "gray/megabecquerel/minute";
  unit MWDERIVEDUNIT_gray__minute = metre^2 * 0.01666667 dimensionless / second^3; MWDERIVEDUNIT_gray__minute is "gray/minute";
  unit MWDERIVEDUNIT_1__gray = second^2 * dimensionless / metre^2; MWDERIVEDUNIT_1__gray is "1/gray";
  unit MWDERIVEDUNIT_megabecquerel__nanomole = 1e15 dimensionless / (mole * second); MWDERIVEDUNIT_megabecquerel__nanomole is "megabecquerel/nanomole";
  unit MWDERIVEDUNIT_1__mole = dimensionless / mole; MWDERIVEDUNIT_1__mole is "1/mole";
  unit MWBUILTINPREFIX_mega_MWBUILTINUNIT_becquerel = 1000000 dimensionless / second; MWBUILTINPREFIX_mega_MWBUILTINUNIT_becquerel is "megabecquerel";
  unit MWDERIVEDUNIT_gram__liter = gram * 1000 dimensionless / metre^3; MWDERIVEDUNIT_gram__liter is "gram/liter";
end
